<?xml version="1.0"?>

<!-- =================================================
                      EXTRA EA 300
             Patrizio MELIS 2017 2018 2019

               GNU GENERAL PUBLIC LICENSE
                  Version 2, June 1991
     =================================================
-->

<propeller name="MTV-9-B-C_C_200-15">

	<ixx>1.67</ixx>
	<diameter unit="IN">77.7</diameter>
	<numblades>3</numblades>
	<gearratio>1</gearratio>
	<cp_factor>1</cp_factor>
	<ct_factor>3</ct_factor>
	<minpitch>12</minpitch>
	<maxpitch>45</maxpitch>
	<minrpm>1400</minrpm>
	<maxrpm>2700</maxrpm>

	<table name="C_THRUST" type="internal">
		<tableData>
			     -15      0       15      30      45      60
			0.00  0.0492  0.0974  0.1457  0.1940  0.2422  0.2905
			0.05  0.0445  0.0924  0.1401  0.1875  0.2348  0.2817
			0.10  0.0399  0.0876  0.1348  0.1815  0.2277  0.2735
			0.15  0.0355  0.0829  0.1297  0.1757  0.2211  0.2657
			0.20  0.0311  0.0784  0.1248  0.1703  0.2148  0.2583
			0.25  0.0267  0.0740  0.1202  0.1651  0.2089  0.2514
			0.30  0.0224  0.0698  0.1157  0.1602  0.2033  0.2449
			0.35  0.0181  0.0656  0.1115  0.1556  0.1980  0.2387
			0.40  0.0139  0.0616  0.1073  0.1512  0.1930  0.2329
			0.45  0.0096  0.0576  0.1034  0.1470  0.1883  0.2274
			0.50  0.0054  0.0537  0.0996  0.1429  0.1838  0.2223
			0.55  0.0011  0.0499  0.0959  0.1391  0.1796  0.2173
			0.60 -0.0032  0.0461  0.0923  0.1355  0.1756  0.2127
			0.65 -0.0075  0.0423  0.0888  0.1320  0.1718  0.2083
			0.70 -0.0118  0.0386  0.0854  0.1286  0.1682  0.2042
			0.75 -0.0162  0.0349  0.0821  0.1254  0.1648  0.2002
			0.80 -0.0207  0.0312  0.0789  0.1223  0.1615  0.1965
			0.85 -0.0252  0.0275  0.0757  0.1193  0.1584  0.1930
			0.90 -0.0297  0.0239  0.0726  0.1165  0.1555  0.1896
			0.95 -0.0344  0.0202  0.0695  0.1137  0.1527  0.1865
			1.00 -0.0391  0.0165  0.0665  0.1111  0.1500  0.1835
			1.05 -0.0439  0.0128  0.0636  0.1085  0.1475  0.1806
			1.10 -0.0487  0.0091  0.0607  0.1060  0.1451  0.1779
			1.15 -0.0537  0.0053  0.0578  0.1036  0.1427  0.1753
			1.20 -0.0588  0.0016  0.0549  0.1012  0.1405  0.1728
			1.25 -0.0639 -0.0023  0.0520  0.0989  0.1384  0.1705
			1.30 -0.0692 -0.0061  0.0492  0.0967  0.1363  0.1682
			1.35 -0.0745 -0.0100  0.0463  0.0945  0.1344  0.1661
			1.40 -0.0800 -0.0139  0.0435  0.0923  0.1325  0.1641
			1.50 -0.0912 -0.0219  0.0379  0.0882  0.1290  0.1603
			1.60 -0.1030 -0.0302  0.0322  0.0842  0.1257  0.1568
			1.70 -0.1152 -0.0386  0.0265  0.0803  0.1226  0.1536
			1.80 -0.1279 -0.0473  0.0208  0.0765  0.1198  0.1507
			1.90 -0.1411 -0.0563  0.0149  0.0727  0.1171  0.1480
			2.00 -0.1548 -0.0656  0.0090  0.0691  0.1145  0.1454
			2.10 -0.1690 -0.0751  0.0030  0.0654  0.1121  0.1431
			2.20 -0.1838 -0.0850 -0.0031  0.0618  0.1098  0.1409
			2.30 -0.1991 -0.0952 -0.0094  0.0582  0.1076  0.1388
			2.40 -0.2150 -0.1056 -0.0158  0.0546  0.1055  0.1369
		</tableData>
	</table>

	<table name="C_POWER" type="internal">
		<tableData>
			     -15      0       15      30      45      60
			0.00  0.0105  0.0408  0.0937  0.1694  0.2677  0.3887
			0.05  0.0112  0.0421  0.0957  0.1721  0.2711  0.3929
			0.10  0.0116  0.0432  0.0975  0.1746  0.2744  0.3969
			0.15  0.0116  0.0440  0.0991  0.1770  0.2776  0.4010
			0.20  0.0114  0.0446  0.1005  0.1792  0.2807  0.4051
			0.25  0.0109  0.0449  0.1017  0.1813  0.2838  0.4092
			0.30  0.0102  0.0449  0.1026  0.1833  0.2868  0.4133
			0.35  0.0091  0.0448  0.1034  0.1851  0.2898  0.4175
			0.40  0.0077  0.0443  0.1040  0.1868  0.2927  0.4217
			0.45  0.0061  0.0437  0.1044  0.1884  0.2956  0.4261
			0.50  0.0042  0.0427  0.1047  0.1899  0.2986  0.4305
			0.55  0.0019  0.0416  0.1047  0.1914  0.3015  0.4350
			0.60 -0.0006  0.0402  0.1046  0.1927  0.3044  0.4396
			0.65 -0.0035  0.0385  0.1043  0.1939  0.3073  0.4444
			0.70 -0.0067  0.0366  0.1039  0.1950  0.3102  0.4492
			0.75 -0.0102  0.0345  0.1032  0.1961  0.3131  0.4542
			0.80 -0.0140  0.0320  0.1024  0.1971  0.3160  0.4593
			0.85 -0.0182  0.0294  0.1014  0.1979  0.3190  0.4645
			0.90 -0.0227  0.0264  0.1002  0.1987  0.3219  0.4698
			0.95 -0.0275  0.0232  0.0988  0.1994  0.3249  0.4753
			1.00 -0.0328  0.0197  0.0973  0.2000  0.3279  0.4809
			1.05 -0.0383  0.0159  0.0955  0.2005  0.3309  0.4866
			1.10 -0.0443  0.0118  0.0936  0.2009  0.3339  0.4925
			1.15 -0.0506  0.0075  0.0914  0.2012  0.3369  0.4985
			1.20 -0.0573  0.0028  0.0891  0.2015  0.3400  0.5046
			1.25 -0.0644 -0.0021  0.0865  0.2016  0.3430  0.5108
			1.30 -0.0718 -0.0074  0.0838  0.2016  0.3461  0.5172
			1.35 -0.0797 -0.0129  0.0808  0.2015  0.3491  0.5237
			1.40 -0.0880 -0.0188  0.0776  0.2013  0.3522  0.5304
			1.50 -0.1059 -0.0316  0.0705  0.2005  0.3583  0.5440
			1.60 -0.1255 -0.0457  0.0626  0.1993  0.3645  0.5581
			1.70 -0.1468 -0.0611  0.0537  0.1976  0.3706  0.5727
			1.80 -0.1699 -0.0780  0.0438  0.1953  0.3767  0.5878
			1.90 -0.1950 -0.0963  0.0329  0.1925  0.3827  0.6033
			2.00 -0.2219 -0.1161  0.0210  0.1892  0.3886  0.6192
			2.10 -0.2507 -0.1373  0.0080  0.1852  0.3944  0.6355
			2.20 -0.2816 -0.1602 -0.0061  0.1807  0.4001  0.6522
			2.30 -0.3144 -0.1846 -0.0213  0.1755  0.4057  0.6693
			2.40 -0.3493 -0.2106 -0.0376  0.1696  0.4111  0.6868
		</tableData>
	</table>

</propeller>
