<?xml version="1.0"?>

<!-- =================================================
                      EXTRA EA 300
             Patrizio MELIS 2017 2018 2019

               GNU GENERAL PUBLIC LICENSE
                  Version 2, June 1991
     =================================================
-->

<piston_engine name="lycoming-AEIO-540-L1B5">

	<minmp unit="INHG">10.0</minmp>
	<maxmp unit="INHG">28.5</maxmp>
	<displacement unit="IN3">570</displacement>
	<maxhp>300</maxhp>
	<cycles>6</cycles>
	<idlerpm>700</idlerpm>
	<maxrpm>2700</maxrpm>
	<sparkfaildrop>0.1</sparkfaildrop>
	<volumetric-efficiency>0.85</volumetric-efficiency>
	<man-press-lag>0.1</man-press-lag>

</piston_engine>
