<?xml version="1.0"?>

<!-- =====================================
          Extra EA 300 Aerodynamics
        Patrizio MELIS © 2017 2018 2019

          GNU GENERAL PUBLIC LICENSE
            Version 2, June 1991
     ===================================== -->

<aerodynamics> <!-- Very basic aerodynamics, to get everything else working first -->

	<axis name="LIFT">

		<function name="aero/coefficient/CLalpha">
			<description>Lift due to alpha</description>
			<product>
				<property>aero/qbar-psf</property>
				<property>metrics/Sw-sqft</property>
				<value>1.0328138</value> <!-- Tuning factor -->
				<table>
					<independentVar lookup="row">aero/alpha-rad</independentVar>
					<independentVar lookup="column">aero/stall-hyst-norm</independentVar>
					<tableData>
						       0     1
						-0.09 -0.05 -0.05
						 0.00  0.37  0.37
						 0.09  0.91  0.91
						 0.10  1.03  0.98
						 0.12  1.12  0.99
						 0.14  1.22  1.01
						 0.16  1.28  1.02
						 0.17  1.33  1.03
						 0.19  1.39  1.05
						 0.21  1.45  1.06
						 0.24  1.55  1.08
						 0.26  1.64  1.10
						 0.28  1.67  1.12
						 0.30  1.63  1.15
						 0.32  1.58  1.19
						 0.34  1.50  1.25
						 0.36  1.35  1.35
						 0.52  1.47  1.47
						 0.70  1.55  1.65
						 0.87  1.57  1.47
						 1.05  1.27  1.17
						 1.57  0.05  0.05
					</tableData>
				</table>
			</product>
		</function>

	</axis>

	<axis name="DRAG">

		<function name="aero/coefficient/CD0">
			<description>Minimum drag</description>
			<product>
				<property>aero/qbar-psf</property>
				<property>metrics/Sw-sqft</property>
				<value>0.035313</value>
			</product>
		</function>

		<function name="aero/coefficient/CDalpha">
			<description>Drag due to alpha</description>
			<product>
				<property>aero/qbar-psf</property>
				<property>metrics/Sw-sqft</property>
				<value>0.5387825</value> <!-- Tuning factor -->
				<table>
					<independentVar lookup="row">aero/alpha-rad</independentVar>
					<tableData>
						-0.0873  0.0041
						-0.0698  0.0013
						-0.0524  0.0001
						-0.0349  0.0003
						-0.0175  0.0020
						 0.0000  0.0052
						 0.0175  0.0099
						 0.0349  0.0162
						 0.0524  0.0240
						 0.0698  0.0334
						 0.0873  0.0442
						 0.1047  0.0566
						 0.1222  0.0706
						 0.1396  0.0860
						 0.1571  0.0962
						 0.1745  0.1069
						 0.1920  0.1180
						 0.2094  0.1298
						 0.2269  0.1424
						 0.2443  0.1565
						 0.3491  0.2537
						 0.5236  0.4500
						 0.6981  0.7000
						 0.8727  1.0000
						 1.0472  1.3500
						 1.2217  1.5000
						 1.3963  1.5700
						 1.5710  1.6000
					  </tableData>
				</table>
			</product>
		</function>

		<function name="aero/coefficient/CDi">
			<description>Induced drag</description>
			<product>
				<property>aero/qbar-psf</property>
				<property>metrics/Sw-sqft</property>
				<property>aero/cl-squared</property>
				<value>0.002298</value>
			</product>
		</function>

		<function name="aero/coefficient/CDbeta">
			<description>Drag due to sideslip</description>
			<product>
				<property>aero/qbar-psf</property>
				<property>metrics/Sw-sqft</property>
				<property>aero/mag-beta-rad</property>
				<value>0.2013</value>
			</product>
		</function>

		<function name="aero/coefficient/CDde">
			<description>Drag due to elevator deflection</description>
			<product>
				<property>aero/qbar-psf</property>
				<property>metrics/Sw-sqft</property>
				<abs><toradians><property>fcs/elevator-deg</property></toradians></abs>
				<value>0.004292</value>
			</product>
		</function>

	</axis>

	<axis name="SIDE">

		<function name="aero/coefficient/CYbeta">
			<description>Side force due to beta</description>
			<product>
				<property>aero/qbar-psf</property>
				<property>metrics/Sw-sqft</property>
				<table>
					<independentVar lookup="row">aero/beta-rad</independentVar>
					<tableData>
						-0.349  0.109
						 0.000  0.000
						 0.349 -0.109
					  </tableData>
				</table>
			</product>
		</function>

		<function name="aero/coefficient/CYdr">
			<description>Side force due to rudder</description>
			<product>
				<property>aero/qbar-psf</property>
				<property>metrics/Sw-sqft</property>
				<toradians><property>fcs/rudder-deg</property></toradians>
				<value>0.0245</value>
			</product>
		</function>

	</axis>

	<axis name="ROLL">

		<function name="aero/coefficient/Clbeta">
			<description>Roll moment due to beta</description>
			<product>
				<property>aero/qbar-psf</property>
				<property>metrics/Sw-sqft</property>
				<property>metrics/bw-ft</property>
				<property>aero/beta-rad</property>
				<value>-0.0605</value>
			</product>
		</function>

		<function name="aero/coefficient/Clp">
			<description>Roll moment due to roll rate</description>
			<product>
				<property>aero/qbar-psf</property>
				<property>metrics/Sw-sqft</property>
				<property>metrics/bw-ft</property>
				<property>aero/bi2vel</property>
				<property>velocities/p-aero-rad_sec</property>
				<value>-0.411</value>
			</product>
		</function>

		<function name="aero/coefficient/Clda_l">
			<description>Roll moment due to left aileron</description>
			<product>
				<property>aero/qbar-psf</property>
				<property>metrics/Sw-sqft</property>
				<property>metrics/bw-ft</property>
				<toradians><property>fcs/aileron-left-deg</property></toradians>
				<value>0.06943</value>
				<table>
					<independentVar lookup="row">aero/alpha-deg</independentVar>
					<independentVar lookup="column">aero/stall-hyst-norm</independentVar>
					<tableData>
						    0     1
						10  1.00  0.30
						13  0.30  0.30
						20 -0.15 -0.15
					</tableData>
				</table>
			</product>
		</function>

		<function name="aero/coefficient/Clda_r">
			<description>Roll moment due to right aileron</description>
			<product>
				<property>aero/qbar-psf</property>
				<property>metrics/Sw-sqft</property>
				<property>metrics/bw-ft</property>
				<toradians><property>fcs/aileron-right-deg</property></toradians>
				<value>-0.06943</value>
				<table>
					<independentVar lookup="row">aero/alpha-deg</independentVar>
					<independentVar lookup="column">aero/stall-hyst-norm</independentVar>
					<tableData>
						    0     1
						10  1.00  0.30
						13  0.30  0.30
						20 -0.15 -0.15
					</tableData>
				</table>
			</product>
		</function>

		<function name="aero/coefficient/Cldr">
			<description>Roll moment due to rudder</description>
			<product>
				<property>aero/qbar-psf</property>
				<property>metrics/Sw-sqft</property>
				<property>metrics/bw-ft</property>
				<toradians><property>fcs/rudder-deg</property></toradians>
				<value>0.04757</value>
			</product>
		</function>

	</axis>

	<axis name="PITCH">

		<function name="aero/coefficient/Cmalpha">
			<description>Pitch moment due to alpha</description>
			<product>
				<property>aero/qbar-psf</property>
				<property>metrics/Sw-sqft</property>
				<property>metrics/cbarw-ft</property>
				<property>aero/alpha-rad</property>
				<value>-0.586376</value>
			</product>
		</function>

		<function name="aero/coefficient/Cmq">
			<description>Pitch moment due to pitch rate</description>
			<product>
				<property>aero/qbar-psf</property>
				<property>metrics/Sw-sqft</property>
				<property>metrics/cbarw-ft</property>
				<property>aero/ci2vel</property>
				<property>velocities/q-aero-rad_sec</property>
				<value>-12.63</value>
			</product>
		</function>

		<function name="aero/coefficient/Cmde">
			<description>Pitch moment due to elevator</description>
			<product>
				<property>aero/qbar-psf</property>
				<property>metrics/Sw-sqft</property>
				<property>metrics/cbarw-ft</property>
				<toradians><property>fcs/elevator-deg</property></toradians>
				<value>-0.88485</value>
				<table>
					<independentVar lookup="row">aero/alpha-deg</independentVar>
					<independentVar lookup="column">fcs/elevator-deg</independentVar>
					<tableData>
						   -12   12
						 7  1.0  1.0
						13  0.3  0.7
						18  0.2  0.5
						24  0.1  0.3
					</tableData>
				</table>
			</product>
		</function>

	</axis>

	<axis name="YAW">

		<function name="aero/coefficient/Cnbeta">
			<description>Yaw moment due to beta</description>
			<product>
				<property>aero/qbar-psf</property>
				<property>metrics/Sw-sqft</property>
				<property>metrics/bw-ft</property>
				<table>
					<independentVar lookup="row">aero/beta-rad</independentVar>
					<tableData>
						-0.349 -0.0115
						 0.000  0.0000
						 0.349  0.0115
					</tableData>
				</table>
			</product>
		</function>

		<function name="aero/coefficient/Cnr">
			<description>Yaw moment due to yaw rate</description>
			<product>
				<property>aero/qbar-psf</property>
				<property>metrics/Sw-sqft</property>
				<property>metrics/bw-ft</property>
				<property>aero/bi2vel</property>
				<property>velocities/r-aero-rad_sec</property>
				<value>-0.154</value>
			</product>
		</function>

		<function name="aero/coefficient/Cndr">
			<description>Yaw moment due to rudder</description>
			<product>
				<property>aero/qbar-psf</property>
				<property>metrics/Sw-sqft</property>
				<property>metrics/bw-ft</property>
				<toradians><property>fcs/rudder-deg</property></toradians>
				<value>0.02503</value>
			</product>
		</function>

	</axis>

</aerodynamics>
